# OpenSim document version 40600
ForceSet:
  PointActuator sacrum_x: body=spine point=(0 0 0) direction=(1 0 0) optimal_force=10
  PointActuator sacrum_y: body=spine point=(0 0 0) direction=(0 1 0) optimal_force=10
  PointActuator sacrum_z: body=spine point=(0 0 0) direction=(0 1 0) optimal_force=10
  TorqueActuator sacrum_pitch: bodyA=spine bodyB=ground axis=(0 0 1) optimal_force=15
  TorqueActuator sacrum_roll: bodyA=spine bodyB=ground axis=(1 0 0) optimal_force=15
  TorqueActuator sacrum_yaw: bodyA=spine bodyB=ground axis=(0 1 0) optimal_force=15
  CoordinateActuator hip_r_flx: coordinate=hip_r_flx optimal_force=10
  CoordinateActuator hip_r_add: coordinate=hip_r_add optimal_force=10
  CoordinateActuator hip_r_int: coordinate=hip_r_int optimal_force=10
  CoordinateActuator knee_r_flx: coordinate=knee_r_flx optimal_force=10
  CoordinateActuator ankle_r_flx: coordinate=ankle_r_flx optimal_force=10
  CoordinateActuator hip_l_flx: coordinate=hip_l_flx optimal_force=10
  CoordinateActuator hip_l_add: coordinate=hip_l_add optimal_force=10
  CoordinateActuator hip_l_int: coordinate=hip_l_int optimal_force=10
  CoordinateActuator knee_l_flx: coordinate=knee_l_flx optimal_force=10
  CoordinateActuator ankle_l_flx: coordinate=ankle_l_flx optimal_force=10
