# OpenSim document version 40000
InverseKinematicsTool:
  results_directory: ./
  constraint_weight: Inf
  accuracy: 1e-5
  time_range: 0 Inf
  report_errors: true
  report_marker_locations: true
  IKTaskSet:
    IKMarkerTask RASI: apply=true weight=1
    IKMarkerTask RHIP: apply=true weight=1
    IKMarkerTask RKNE: apply=true weight=0.1
    IKMarkerTask RANK: apply=true weight=1
    IKMarkerTask RTOE: apply=true weight=1
    IKMarkerTask TAIL: apply=true weight=1
    IKMarkerTask SPL6: apply=true weight=1
    IKMarkerTask LASI: apply=true weight=1
    IKMarkerTask LHIP: apply=true weight=1
    IKMarkerTask LKNE: apply=true weight=0.1
      # TODO: Why are the knee weights different?
    IKMarkerTask LANK: apply=true weight=1
    IKMarkerTask LTOE: apply=true weight=1
