# OpenSim document version 40000
InverseKinematicsTool:
  results_directory: ./
  constraint_weight: Inf
  accuracy: 1e-5
  marker_file: LGS01_Baseline_Walk08.trc
  time_range: 0 4.095
  report_errors: true
  report_marker_locations: true
  IKTaskSet:
    IKMarkerTask RASI: apply=true weight=1
    IKMarkerTask RHIP: apply=true weight=1
    IKMarkerTask RKNE: apply=true weight=0.1
    IKMarkerTask RANK: apply=true weight=1
    IKMarkerTask RTOE: apply=true weight=1
    IKMarkerTask TAIL: apply=true weight=1
    IKMarkerTask SPL6: apply=true weight=1
    IKMarkerTask LASI: apply=false weight=0
    IKMarkerTask LHIP: apply=false weight=0
    IKMarkerTask LKNE: apply=false weight=0
      # TODO: Why are the knee weights different?
    IKMarkerTask LANK: apply=false weight=0
    IKMarkerTask LTOE: apply=false weight=0
