# OpenSim document version 40000
ScaleTool LGS01_Baseline:
  mass: 0.2726 [kg]
  height: -1
  age: -1
  ModelScaler:
    apply: true
    scaling_order: measurements manualScale
    marker_file: D:\Brody\AFIRM3\LGS01\Baseline\LGS01_Baseline_static01.trc
    time_range: 0 4.735
    preserve_mass_distribution: false
    MeasurementSet:
      Measurement spine: apply=true
        MarkerPair: markers=(TAIL SPL6)
        BodyScale spine: axes=(X Y Z)
      Measurement pelvis_length: apply=true
        MarkerPair: markers=(RASI RHIP)
        MarkerPair: markers=(LASI LHIP)
        MarkerPair: markers=(SPL6 TAIL)
        BodyScale pelvis_r: axes=(X Y)
        BodyScale pelvis_l: axes=(X Y)
      Measurement pelvis_width: apply=true
        MarkerPair: markers=(RHIP LHIP)
        BodyScale pelvis_r: axes=Z
        BodyScale pelvis_l: axes=Z
      Measurement foot_r: apply=true
        MarkerPair: markers=(RANK RTOE)
        BodyScale foot_r: axes=(X Y Z)
      Measurement foot_l: apply=true
        MarkerPair: markers=(LANK LTOE)
        BodyScale foot_l: axes=(X Y Z)
    ScaleSet:
      Scale: scales=(1 1 1) segment=femur_r apply=true
      Scale: scales=(1 1 1) segment=tibia_r apply=true
      Scale: scales=(1 1 1) segment=femur_l apply=true
      Scale: scales=(1 1 1) segment=tibia_l apply=true
  MarkerPlacer:
    apply: true
    marker_file: D:\Brody\AFIRM3\LGS01\Baseline\LGS01_Baseline_static01.trc
    time_range: 0 4.735
    max_marker_movement: -1
    IKTaskSet:
      IKMarkerTask RASI: apply=true weight=1
      IKMarkerTask RHIP: apply=true weight=1
      IKMarkerTask RKNE: apply=true weight=0.1
      IKMarkerTask RANK: apply=true weight=1
      IKMarkerTask RTOE: apply=true weight=1
      IKMarkerTask TAIL: apply=true weight=1
      IKMarkerTask SPL6: apply=true weight=1
      IKMarkerTask LASI: apply=true weight=1
      IKMarkerTask LHIP: apply=true weight=1
      IKMarkerTask LKNE: apply=true weight=0.1
      IKMarkerTask LANK: apply=true weight=1
      IKMarkerTask LTOE: apply=true weight=1
